*Heading
** Job name: Job-55555 Model name: Model
** Generated by: Abaqus/CAE 2023
*Preprint, echo=NO, model=NO, history=NO, contact=NO
**
** PARTS
**
*Part, name=GHS-New2
*End Part
**
*Part, name=Shell
*Node
      1,  -23.9208965,   16.1432095,  0.200000003
      2,  -18.4038658,     22.22859,  0.200000003
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*Element, type=S4R
 1, 22,  1, 23, 44
 2,  1,  2, 24, 23
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*Nset, nset=Set-1, generate
  1,  44,   1
*Elset, elset=Set-1, generate
  1,  22,   1
** Section: Section-2
*Shell Section, elset=Set-1, material=PLA
0.0254, 5
*End Part
**
**
** ASSEMBLY
**
*Assembly, name=Assembly
**
*Instance, name=GHS-New2-1, part=GHS-New2
*Node
      1,        -17.5,  -21.8245735,   21.4790916
      2,        -17.5,   -17.247324,   24.8751221
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*Element, type=C3D10
    1,  1028,  5019,  3752,  1029,  5053,  5052,  5051,  5055,  5054,  5056
    2,  3576,  3153,  3591,  3575,  5059,  5058,  5057,  5061,  5060,  5062
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*Nset, nset=Set-1, generate
     1,  33962,      1
*Elset, elset=Set-1, generate
     1,  18961,      1
*Nset, nset=Set-2, generate
     1,  33962,      1
*Elset, elset=Set-2, generate
     1,  18961,      1
*Nset, nset=Set-3, generate
     1,  33962,      1
*Elset, elset=Set-3, generate
     1,  18961,      1
** Section: section1
*Solid Section, elset=Set-2, material=Material-2
,
*End Instance
**
*Instance, name=Part-2-1, part=Shell
15.0785057359923, -11.7054636361212, 1.93216197036282
15.0785057359923, -11.7054636361212, 1.93216197036282, 15.7922557960565, -11.9190612337662, 2.59919789740089, 202.244405164085
*End Instance
**
*Nset, nset=Set-1, instance=GHS-New2-1
 92,
*Nset, nset=Set-6, instance=GHS-New2-1
    91,    92,  1203,  1204,  1205,  1206
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*Elset, elset=Set-6, instance=GHS-New2-1
   790,   839,   894,  1052,  1090,  1417
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*Nset, nset=Set-Back-Circle, instance=GHS-New2-1
    45,    46,    47,    48,    49,    50
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*Elset, elset=Set-Back-Circle, instance=GHS-New2-1
    54,   114,   180,   221,   249,   250
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*Nset, nset=Set-Houny-Comb, instance=GHS-New2-1
    60,    62,    93,    94,    95,    96
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*Elset, elset=Set-Houny-Comb, instance=GHS-New2-1
    22,    27,   359,   363,   435,   437
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*Nset, nset=Set-Node-1, instance=GHS-New2-1
 13821,
*Nset, nset=Set-Node-2, instance=GHS-New2-1
 28251,
*Elset, elset=_m_Surf-1_S2, internal, instance=GHS-New2-1
   790,   877,  1313,  1322,  1469,  1759
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*Elset, elset=_m_Surf-1_S1, internal, instance=GHS-New2-1
   811,   825,  1051,  1309,  1933,  2092
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*Elset, elset=_m_Surf-1_S4, internal, instance=GHS-New2-1
   850,   911,  1268,  1296,  1362,  1444
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*Elset, elset=_m_Surf-1_S3, internal, instance=GHS-New2-1
   893,  1038,  1052,  1064,  1094,  1320
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*Surface, type=ELEMENT, name=m_Surf-1
_m_Surf-1_S2, S2
_m_Surf-1_S1, S1
_m_Surf-1_S4, S4
_m_Surf-1_S3, S3
*Elset, elset=_s_Surf-1_S3, internal, instance=GHS-New2-1
   114,   221,   250,   361,   372,   428
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*Elset, elset=_s_Surf-1_S1, internal, instance=GHS-New2-1
   180,   249,   270,   475,  1137,  1336
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*Elset, elset=_s_Surf-1_S4, internal, instance=GHS-New2-1
   364,   446,   459,   698,   752,   947
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*Elset, elset=_s_Surf-1_S2, internal, instance=GHS-New2-1
   282,   431,   432,   505,   621,   659
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*Surface, type=ELEMENT, name=s_Surf-1
_s_Surf-1_S3, S3
_s_Surf-1_S1, S1
_s_Surf-1_S4, S4
_s_Surf-1_S2, S2
** Constraint: Constraint-1
*Tie, name=Constraint-1, adjust=yes
s_Surf-1, m_Surf-1
*End Assembly
*Amplitude, name=STEPANISHEN_COX
             0.,         -0.5552,           0.002,         -0.5552,           0.004,         -0.5324,           0.006,         -0.5118
          0.008,          -0.494,            0.01,         -0.4612,           0.012,         -0.3709,           0.014,         -0.2707
          0.016,         -0.1904,           0.018,         -0.0651,            0.02,           0.088,           0.022,          0.1108
          0.024,          0.0736,           0.026,         -0.0311,           0.028,         -0.2107,            0.03,         -0.4379
          0.032,         -0.6851,           0.034,         -0.7869,           0.036,         -0.7866,           0.038,         -0.7713
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          2.504,             -5.
**
** MATERIALS
**
*Material, name=Material-2
*Acoustic Medium
 2.07e+09,
*Density
1000.,
*Elastic
 2.2e+09, 0.43
*Material, name=PLA
*Density
7800.,
*Elastic
 2.068e+11, 0.3
**
** BOUNDARY CONDITIONS
**
** Name: BC-3 Type: Displacement/Rotation
*Boundary
Set-Node-1, 6, 6
** Name: BC-4 Type: Displacement/Rotation
*Boundary
Set-Node-1, 1, 1
** ----------------------------------------------------------------
**
** STEP: Step-11
**
*Step, name=Step-11, nlgeom=NO, perturbation
freq
*Frequency, eigensolver=Lanczos, sim, acoustic coupling=on, normalization=mass
200, 200., 3200., 200., ,
**
** OUTPUT REQUESTS
**
*Restart, write, frequency=0
**
** FIELD OUTPUT: F-Output-2
**
*Output, field
*Node Output
U,
**
** HISTORY OUTPUT: H-Output-2
**
*Output, history
*Energy Output
ALLKE, ALLSE
*End Step
** ----------------------------------------------------------------
**
** STEP: Step-1
**
*Step, name=Step-1, nlgeom=NO, perturbation
*Steady State Dynamics, direct, frequency scale=LINEAR, friction damping=NO
200., 500., 93, 1.
**
** OUTPUT REQUESTS
**
*Output, field, frequency=0
*Output, history, frequency=0
*End Step
** ----------------------------------------------------------------
**
** STEP: Step-2
**
*Step, name=Step-2, nlgeom=NO, perturbation
*Steady State Dynamics, direct, frequency scale=LINEAR, friction damping=NO
500., 800., 120, 1.
**
** OUTPUT REQUESTS
**
*Output, field, frequency=0
*Output, history, frequency=0
*End Step
** ----------------------------------------------------------------
**
** STEP: Step-3
**
*Step, name=Step-3, nlgeom=NO, perturbation
*Steady State Dynamics, direct, frequency scale=LINEAR, friction damping=NO
800., 1100., 180, 1.
**
** OUTPUT REQUESTS
**
*Output, field, frequency=0
*Output, history, frequency=0
*End Step
** ----------------------------------------------------------------
**
** STEP: Step-4
**
*Step, name=Step-4, nlgeom=NO, perturbation
*Steady State Dynamics, direct, frequency scale=LINEAR, friction damping=NO
1100., 1400., 200, 1.
**
** OUTPUT REQUESTS
**
*Output, field, frequency=0
*Output, history, frequency=0
*End Step
** ----------------------------------------------------------------
**
** STEP: Step-5
**
*Step, name=Step-5, nlgeom=NO, perturbation
*Steady State Dynamics, direct, frequency scale=LINEAR, friction damping=NO
1400., 1700., 250, 1.
**
** OUTPUT REQUESTS
**
*Output, field, frequency=0
*Output, history, frequency=0
*End Step
** ----------------------------------------------------------------
**
** STEP: Step-6
**
*Step, name=Step-6, nlgeom=NO, perturbation
*Steady State Dynamics, direct, friction damping=NO
1700., 2000., 300, 1.
**
** OUTPUT REQUESTS
**
*Output, field, frequency=0
*Output, history, frequency=0
*End Step
** ----------------------------------------------------------------
**
** STEP: Step-7
**
*Step, name=Step-7, nlgeom=NO, perturbation
*Steady State Dynamics, direct, frequency scale=LINEAR, friction damping=NO
2000., 2300., 330, 1.
**
** OUTPUT REQUESTS
**
*Output, field, frequency=0
*Output, history, frequency=0
*End Step
** ----------------------------------------------------------------
**
** STEP: Step-8
**
*Step, name=Step-8, nlgeom=NO, perturbation
*Steady State Dynamics, direct, frequency scale=LINEAR, friction damping=NO
2300., 2600., 380, 1.
**
** OUTPUT REQUESTS
**
*Output, field, frequency=0
*Output, history, frequency=0
*End Step
** ----------------------------------------------------------------
**
** STEP: Step-9
**
*Step, name=Step-9, nlgeom=NO, perturbation
*Steady State Dynamics, direct, frequency scale=LINEAR, friction damping=NO
2600., 2900., 400, 1.
**
** OUTPUT REQUESTS
**
*Output, field, frequency=0
*Output, history, frequency=0
*End Step
** ----------------------------------------------------------------
**
** STEP: Step-10
**
*Step, name=Step-10, nlgeom=NO, perturbation
*Steady State Dynamics, direct, friction damping=NO
2600., 2900., 400, 1.
**
** OUTPUT REQUESTS
**
*Output, field, frequency=0
*Output, history, frequency=0
*End Step
